$PROBLEM 1-compartment model
$INPUT
$DATA dataset.csv IGNORE=I
$SUBROUTINE ADVAN1 TRANS1
$PK
 K = THETA(1) * EXP(ETA(1))
 V = THETA(2) * EXP(ETA(2))
 S1 = V
$ERROR
 CP = F
 OBS_CP = CP *(1+EPS(1))
 Y = OBS_CP
$THETA 0.0625 ; K
$THETA 80     ; V
$OMEGA 0.025  ; K
$OMEGA 0.025  ; V
$SIGMA 0.025  ; PROP
