$PROBLEM 1-compartment model
$INPUT
$DATA dataset.csv IGNORE=I
$SUBROUTINE ADVAN2 TRANS1
$PK
 KA = THETA(1) * EXP(ETA(1))
 K = THETA(2) * EXP(ETA(2))
 V = THETA(3) * EXP(ETA(3))
 S2 = V
$ERROR
 CP = F
 OBS_CP = CP *(1+EPS(1))
 Y = OBS_CP
$THETA 1     ; KA
$THETA 0.065 ; K
$THETA 80    ; V
$OMEGA 0.025 ; KA
$OMEGA 0.025 ; K
$OMEGA 0.025 ; V
$SIGMA 0.025 ; PROP
