$PROBLEM 2-compartment model
$INPUT
$DATA dataset.csv IGNORE=I
$SUBROUTINE ADVAN3 TRANS1
$PK
 K = THETA(1) * EXP(ETA(1))
 V = THETA(2) * EXP(ETA(2))
 K12 = THETA(3) * EXP(ETA(3))
 K21 = THETA(4) * EXP(ETA(4))
 S1 = V
$ERROR
 CP = F
 OBS_CP = CP *(1+EPS(1))
 Y = OBS_CP
$THETA 0.0625; K
$THETA 80    ; V
$THETA 0.05  ; K12
$THETA 0.2   ; K21
$OMEGA 0.025 ; K
$OMEGA 0.025 ; V
$OMEGA 0.025 ; K12
$OMEGA 0.025 ; K21
$SIGMA 0.025 ; PROP
