$PROBLEM 2-compartment model
$INPUT
$DATA dataset.csv IGNORE=I
$SUBROUTINE ADVAN3 TRANS5
$PK
 AOB = THETA(1) * EXP(ETA(1))
 ALPHA = THETA(2) * EXP(ETA(2))
 BETA = THETA(3) * EXP(ETA(3))
$ERROR
 CP = F
 OBS_CP = CP *(1+EPS(1))
 Y = OBS_CP
$THETA 5     ; AOB
$THETA 0.2   ; ALPHA
$THETA 1     ; BETA
$OMEGA 0.025 ; AOB
$OMEGA 0.025 ; ALPHA
$OMEGA 0.025 ; BETA
$SIGMA 0.025 ; ERR_PROP
